*Heading
** Job name: Job-1 Model name: TPB_MEDIUM3_input-Copy
** Generated by: Abaqus/CAE 2022
*Preprint, echo=NO, model=NO, history=NO, contact=NO
**
*PARAMETER
**
*******************************************************************************
**                                                                           **
**  1-Phase: General LDPM,  2-Phase: Not Used,  3-Phase: ITZ Prop.           **
**                                                                           **
*******************************************************************************
**
Density1                            = 2.338e-9
NormalModulus1                      = 60273
ALPHA                               = 0.25
TensileStrength1                    = 3.44
TensileCharacteristicLength1        = 500
ShearStrengthRatio1                 = 2.6
SofteningExponent1                  = 0.4
CompressiveYieldingStrength1        = 150
InitialHardeningModulusRatio1       = 0.4
TransitionalStrainRatio1            = 4
DeviatoricStrainThresholdRatio1     = 1
DeviatoricDamageParameter1          = 5
InitialFriction1                    = 4.000000e-01
AsymptoticFriction1                 = 0.000000e+00
TransitionalStress1                 = 600
DensificationRatio1                 = 1.000000e+00
VolumetricDeviatoricCoupling1       = 0.000000e+00
TensileUnloading1               =0.0
ShearUnloading1                 =0.0
CompressiveUnloading1           =0.0
ShearSoftening1                 =0.0
FinalHardeningModulusRatio1     =0.1
ElasticAnalysisFlag1            =0
**
*******************************************************************************
**                                                                           **
**  1-Phase: Not Used,  2-Phase: Binder Prop.,  3-Phase: Binder Prop.        **
**                                                                           **
*******************************************************************************
**
Density2                        =0
ElasticModulus2                 =0
Poisson2                        =0
TensileStrength2                =0
TensileCharacteristicLength2    =0
ShearStrengthRatio2             =0
SofteningExponent2              =0
CompressiveYieldingStrength2    =0
InitialHardeningModulusRatio2   =0
TransitionalStrainRatio2        =0
DeviatoricStrainThresholdRatio2 =0
DeviatoricDamageParameter2      =0
InitialFriction2                =0
AsymptoticFriction2             =0
TransitionalStress2             =0
DensificationRatio2             =0
VolumetricDeviatoricCoupling2   =0
TensileUnloading2               =0
ShearUnloading2                 =0
CompressiveUnloading2           =0
ShearSoftening2                 =0
FinalHardeningModulusRatio2     =0
ElasticAnalysisFlag2            =0
**
*******************************************************************************
**                                                                           **
**  1-Phase: Not Used,  2-Phase: Aggregate Prop.,  3-Phase: Aggregate Prop.  **
**                                                                           **
*******************************************************************************
**
Density3                        =0
ElasticModulus3                 =0
Poisson3                        =0
TensileStrength3                =0
TensileCharacteristicLength3    =0
ShearStrengthRatio3             =0
SofteningExponent3              =0
CompressiveYieldingStrength3    =0
InitialHardeningModulusRatio3   =0
TransitionalStrainRatio3        =0
DeviatoricStrainThresholdRatio3 =0
DeviatoricDamageParameter3      =0
InitialFriction3                =0
AsymptoticFriction3             =0
TransitionalStress3             =0
DensificationRatio3             =0
VolumetricDeviatoricCoupling3   =0
TensileUnloading3               =0
ShearUnloading3                 =0
CompressiveUnloading3           =0
ShearSoftening3                 =0
FinalHardeningModulusRatio3     =0
ElasticAnalysisFlag3            =0
**
** Other Properties
**
NumberOfUserElement                = 14889
** PARTS
**
*Part, name=PART-1
*USER ELEMENT, NODES=4, TYPE=VU4, COORDINATES=3, variables=300, PROPERTIES=69, I PROPERTIES=1, INTEGRATION=3
1, 2, 3, 4, 5, 6
*Node
      1,           0.,          30.,         200.
      2,           0.,   25.4198551,   191.949646
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*Element, type=VU4,elset=AllEls
    1, 1313, 1282,  862, 1069
    2,  377, 2314, 2460, 2189
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*UEL PROPERTY, ELSET=AllEls
<Density1>, <NormalModulus1>, <ALPHA>, <TensileStrength1>, <TensileCharacteristicLength1>, <ShearStrengthRatio1>, <SofteningExponent1>, <CompressiveYieldingStrength1>,
<InitialHardeningModulusRatio1>, <TransitionalStrainRatio1>, <DeviatoricStrainThresholdRatio1>, <DeviatoricDamageParameter1>, <InitialFriction1>, <AsymptoticFriction1>, <TransitionalStress1>, <DensificationRatio1>,
<VolumetricDeviatoricCoupling1>, <TensileUnloading1>, <ShearUnloading1>, <CompressiveUnloading1>, <ShearSoftening1>, <FinalHardeningModulusRatio1>, <ElasticAnalysisFlag1>, <Density2>,
<ElasticModulus2>, <Poisson2>, <TensileStrength2>, <TensileCharacteristicLength2>, <ShearStrengthRatio2>, <SofteningExponent2>, <CompressiveYieldingStrength2>, <InitialHardeningModulusRatio2>,
<TransitionalStrainRatio2>, <DeviatoricStrainThresholdRatio2>, <DeviatoricDamageParameter2>,  <InitialFriction2>, <AsymptoticFriction2>, <TransitionalStress2>, <DensificationRatio2>, <VolumetricDeviatoricCoupling2>,
<TensileUnloading2>, <ShearUnloading2>, <CompressiveUnloading2>, <ShearSoftening2>, <FinalHardeningModulusRatio2>, <ElasticAnalysisFlag2>, <Density3>, <ElasticModulus3>,
<Poisson3>, <TensileStrength3>, <TensileCharacteristicLength3>, <ShearStrengthRatio3>, <SofteningExponent3>, <CompressiveYieldingStrength3>, <InitialHardeningModulusRatio3>, <TransitionalStrainRatio3>,
<DeviatoricStrainThresholdRatio3>, <DeviatoricDamageParameter3>, <InitialFriction3>, <AsymptoticFriction3>, <TransitionalStress3>, <DensificationRatio3>, <VolumetricDeviatoricCoupling3>, <TensileUnloading3>,
<ShearUnloading3>, <CompressiveUnloading3>, <ShearSoftening3>, <FinalHardeningModulusRatio3>, <ElasticAnalysisFlag3>, <NumberOfUserElement>
*End Part
**
*Part, name=PART-2
*Node
      1,        525.5,         100.,         200.
      2,        525.5,           0.,         200.
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*Element, type=C3D4
   1,  883,  884,  885,  886
   2,  883,  887,  888,  889
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*Nset, nset=_PICKEDSET2, internal, generate
    1,  1939,     1
*Elset, elset=_PICKEDSET2, internal, generate
    1,  8829,     1
** Section: Section-1-_PICKEDSET2
*Solid Section, elset=_PICKEDSET2, material=FEA
,
*End Part
**
*Part, name=PART-3
*Node
      1,          10.,          50.,          10.
      2,          10.,         -50.,          10.
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*Element, type=C3D4
  1, 67, 68, 66, 49
  2, 67, 68, 28, 27
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*Nset, nset=_PICKEDSET3, internal, generate
  1,  86,   1
*Elset, elset=_PICKEDSET3, internal, generate
   1,  240,    1
** Section: Section-2-_PICKEDSET3
*Solid Section, elset=_PICKEDSET3, material=STEEL
,
*End Part
**
**
** ASSEMBLY
**
*Assembly, name=Assembly
**
*Instance, name=PART-1-1, part=PART-1
*End Instance
**
*Instance, name=PART-2-1, part=PART-2
      -525.5,           0.,           0.
*End Instance
**
*Instance, name=PART-2-2, part=PART-2
        100.,           0.,           0.
*End Instance
**
*Instance, name=PART-3-1, part=PART-3
      -515.5,          50.,         -10.
*End Instance
**
*Instance, name=PART-3-2, part=PART-3
       615.5,          50.,         -10.
*End Instance
**
*Instance, name=PART-3-3, part=PART-3
         50.,          50.,         200.
*End Instance
**
*Node
      1,          50.,          50.,         210.
      2,       -515.5,          50.,         -10.
      3,        615.5,          50.,         -10.
*Nset, nset=CMOD, instance=PART-1-1
 1244, 1424
*Nset, nset=RP1
 1,
*Nset, nset=RP2
 2,
*Nset, nset=RP3
 3,
*Nset, nset=ldpm-left, instance=PART-1-1, generate
   1,  290,    1
*Nset, nset=ldpm-right, instance=PART-1-1
  292,  293,  312,  313,  338,  340
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*Nset, nset=ldpm-top, instance=PART-1-1
   1,   3,  34,  35, 134, 135
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*Elset, elset=load, instance=PART-3-3, generate
   1,  240,    1
*Elset, elset=support-1, instance=PART-3-1, generate
   1,  240,    1
*Elset, elset=support-2, instance=PART-3-2, generate
   1,  240,    1
*Nset, nset=_PickedSet22, internal
 1,
*Nset, nset=_PickedSet24, internal
 2,
*Nset, nset=_PickedSet26, internal
 3,
*Elset, elset=_leftbeam-bot_S1, internal, instance=PART-2-1
 4027, 4035, 5376, 5494, 5548
*Elset, elset=_leftbeam-bot_S2, internal, instance=PART-2-1
 5401, 5572, 8197
*Elset, elset=_leftbeam-bot_S3, internal, instance=PART-2-1
   30,  345,  598, 1036, 1633, 1645
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*Elset, elset=_leftbeam-bot_S4, internal, instance=PART-2-1
 3675, 3914, 5659, 6555, 6630, 7009
*Surface, type=ELEMENT, name=leftbeam-bot
_leftbeam-bot_S1, S1
_leftbeam-bot_S2, S2
_leftbeam-bot_S4, S4
_leftbeam-bot_S3, S3
*Elset, elset=_leftbeam-side_S1, internal, instance=PART-2-1
 2032, 4219, 4986, 7676
*Elset, elset=_leftbeam-side_S2, internal, instance=PART-2-1
 1822, 2094
*Elset, elset=_leftbeam-side_S3, internal, instance=PART-2-1
 1241, 1260, 1615, 1694, 1753, 1761
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*Elset, elset=_leftbeam-side_S4, internal, instance=PART-2-1
 2797, 4305
*Surface, type=ELEMENT, name=leftbeam-side
_leftbeam-side_S1, S1
_leftbeam-side_S2, S2
_leftbeam-side_S4, S4
_leftbeam-side_S3, S3
*Elset, elset=_leftsupport_S3, internal, instance=PART-3-1
  12,  18,  24,  30,  34,  41
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*Surface, type=ELEMENT, name=leftsupport
_leftsupport_S3, S3
*Elset, elset=_rightbeam-bot_S1, internal, instance=PART-2-2
 4027, 4035, 5376, 5494, 5548
*Elset, elset=_rightbeam-bot_S2, internal, instance=PART-2-2
 5401, 5572, 8197
*Elset, elset=_rightbeam-bot_S3, internal, instance=PART-2-2
   30,  345,  598, 1036, 1633, 1645
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*Elset, elset=_rightbeam-bot_S4, internal, instance=PART-2-2
 3675, 3914, 5659, 6555, 6630, 7009
*Surface, type=ELEMENT, name=rightbeam-bot
_rightbeam-bot_S1, S1
_rightbeam-bot_S2, S2
_rightbeam-bot_S4, S4
_rightbeam-bot_S3, S3
*Elset, elset=_rightbeam-side_S1, internal, instance=PART-2-2
 6400,
*Elset, elset=_rightbeam-side_S2, internal, instance=PART-2-2
 6422,
*Elset, elset=_rightbeam-side_S3, internal, instance=PART-2-2
  116,  140,  214,  427,  489,  783
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*Elset, elset=_rightbeam-side_S4, internal, instance=PART-2-2
 6415,
*Surface, type=ELEMENT, name=rightbeam-side
_rightbeam-side_S1, S1
_rightbeam-side_S2, S2
_rightbeam-side_S4, S4
_rightbeam-side_S3, S3
*Elset, elset=_rightsupport_S3, internal, instance=PART-3-2
  12,  18,  24,  30,  34,  41
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*Surface, type=ELEMENT, name=rightsupport
_rightsupport_S3, S3
*Elset, elset=_topload_S3, internal, instance=PART-3-3
  32,  51,  73,  82, 107, 126
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*Surface, type=ELEMENT, name=topload
_topload_S3, S3
*Surface, type=NODE, name=ldpm-top_CNS_, internal
ldpm-top, 1.
*Surface, type=NODE, name=ldpm-left_CNS_, internal
ldpm-left, 1.
*Surface, type=NODE, name=ldpm-right_CNS_, internal
ldpm-right, 1.
** Constraint: Rigid-1
*Rigid Body, ref node=_PickedSet22, elset=load
** Constraint: Rigid-2
*Rigid Body, ref node=_PickedSet24, elset=support-1
** Constraint: Rigid-3
*Rigid Body, ref node=_PickedSet26, elset=support-2
** Constraint: tie-1
*Tie, name=tie-1, adjust=yes
ldpm-top_CNS_, topload
** Constraint: tie-2
*Tie, name=tie-2, adjust=yes
leftbeam-side, ldpm-left_CNS_
** Constraint: tie-3
*Tie, name=tie-3, adjust=yes
rightbeam-side, ldpm-right_CNS_
** Constraint: tie-4
*Tie, name=tie-4, adjust=yes
leftbeam-bot, leftsupport
** Constraint: tie-5
*Tie, name=tie-5, adjust=yes
rightbeam-bot, rightsupport
*End Assembly
*Amplitude, name=AMP-1
             0.,              0.,           0.002,              1.,              1.,              1.
**
** MATERIALS
**
*Material, name=FEA
*Density
 2.338e-9,
*Elastic
39000., 0.2
*Material, name=STEEL
*Density
 7.8e-09,
*Elastic
200000., 0.3
** ----------------------------------------------------------------
**
** STEP: Step-1
**
*Step, name=Step-1, nlgeom=YES
*Dynamic, Explicit, direct user control
1e-07, 0.2
*Bulk Viscosity
0., 0.
**
** BOUNDARY CONDITIONS
**
** Name: Disp-BC-1 Type: Displacement/Rotation
*Boundary
RP2, 3, 3
** Name: Disp-BC-2 Type: Displacement/Rotation
*Boundary
RP3, 3, 3
** Name: Disp-BC-3 Type: Displacement/Rotation
*Boundary
RP1, 1, 1
** Name: Vel-BC-1 Type: Velocity/Angular velocity
*Boundary, amplitude=AMP-1, type=VELOCITY
RP1, 3, 3, -5.
**
** OUTPUT REQUESTS
**
*Restart, write, number interval=1, time marks=NO
**
** FIELD OUTPUT: F-Output-1
**
*Output, field, number interval=200
*Node Output, nset=CMOD
RT, UT
**
** FIELD OUTPUT: F-Output-2
**
*Node Output, nset=RP1
RM, RT, UT
**
** FIELD OUTPUT: F-Output-3
**
*Node Output, nset=RP2
RM, RT, UT
**
** FIELD OUTPUT: F-Output-4
**
*Node Output, nset=RP3
RM, RT, UT
**
** HISTORY OUTPUT: H-Output-1
**
*Output, history, variable=PRESELECT
*End Step
