*Heading
** Job name: c1 Model name: comp1
** Generated by: Abaqus/CAE 2022
*Preprint, echo=NO, model=NO, history=NO, contact=NO
**
*PARAMETER
**
*******************************************************************************
**                                                                           **
**  1-Phase: General LDPM,  2-Phase: Not Used,  3-Phase: ITZ Prop.           **
**                                                                           **
*******************************************************************************
**
Density1                            = 2.338e-9
NormalModulus1                      = 60273
ALPHA                               = 0.25
TensileStrength1                    = 3.44
TensileCharacteristicLength1        = 500
ShearStrengthRatio1                 = 2.6
SofteningExponent1                  = 0.4
CompressiveYieldingStrength1        = 150
InitialHardeningModulusRatio1       = 0.4
TransitionalStrainRatio1            = 4
DeviatoricStrainThresholdRatio1     = 1
DeviatoricDamageParameter1          = 5
InitialFriction1                    = 4.000000e-01
AsymptoticFriction1                 = 0.000000e+00
TransitionalStress1                 = 600
DensificationRatio1                 = 1.000000e+00
VolumetricDeviatoricCoupling1       = 0.000000e+00
TensileUnloading1               =0.0
ShearUnloading1                 =0.0
CompressiveUnloading1           =0.0
ShearSoftening1                 =0.0
FinalHardeningModulusRatio1     =0.1
ElasticAnalysisFlag1            =0
**
*******************************************************************************
**                                                                           **
**  1-Phase: Not Used,  2-Phase: Binder Prop.,  3-Phase: Binder Prop.        **
**                                                                           **
*******************************************************************************
**
Density2                        =0
ElasticModulus2                 =0
Poisson2                        =0
TensileStrength2                =0
TensileCharacteristicLength2    =0
ShearStrengthRatio2             =0
SofteningExponent2              =0
CompressiveYieldingStrength2    =0
InitialHardeningModulusRatio2   =0
TransitionalStrainRatio2        =0
DeviatoricStrainThresholdRatio2 =0
DeviatoricDamageParameter2      =0
InitialFriction2                =0
AsymptoticFriction2             =0
TransitionalStress2             =0
DensificationRatio2             =0
VolumetricDeviatoricCoupling2   =0
TensileUnloading2               =0
ShearUnloading2                 =0
CompressiveUnloading2           =0
ShearSoftening2                 =0
FinalHardeningModulusRatio2     =0
ElasticAnalysisFlag2            =0
**
*******************************************************************************
**                                                                           **
**  1-Phase: Not Used,  2-Phase: Aggregate Prop.,  3-Phase: Aggregate Prop.  **
**                                                                           **
*******************************************************************************
**
Density3                        =0
ElasticModulus3                 =0
Poisson3                        =0
TensileStrength3                =0
TensileCharacteristicLength3    =0
ShearStrengthRatio3             =0
SofteningExponent3              =0
CompressiveYieldingStrength3    =0
InitialHardeningModulusRatio3   =0
TransitionalStrainRatio3        =0
DeviatoricStrainThresholdRatio3 =0
DeviatoricDamageParameter3      =0
InitialFriction3                =0
AsymptoticFriction3             =0
TransitionalStress3             =0
DensificationRatio3             =0
VolumetricDeviatoricCoupling3   =0
TensileUnloading3               =0
ShearUnloading3                 =0
CompressiveUnloading3           =0
ShearSoftening3                 =0
FinalHardeningModulusRatio3     =0
ElasticAnalysisFlag3            =0
**
** Other Properties
**
NumberOfUserElement                = 12637
** PARTS
**
*Part, name=PART-1
*USER ELEMENT, NODES=4, TYPE=VU4, COORDINATES=3, variables=300, PROPERTIES=69, I PROPERTIES=1, INTEGRATION=3
1, 2, 3, 4, 5, 6
*Node
      1,           0.,   63.3761024,   158.762375
      2,           0.,   58.4518356,    167.43573
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*Element, type=VU4,elset=AllEls
    1,  725,  839, 1232, 1633
    2, 1442, 2333, 1264, 2218
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*UEL PROPERTY, ELSET=AllEls
<Density1>, <NormalModulus1>, <ALPHA>, <TensileStrength1>, <TensileCharacteristicLength1>, <ShearStrengthRatio1>, <SofteningExponent1>, <CompressiveYieldingStrength1>,
<InitialHardeningModulusRatio1>, <TransitionalStrainRatio1>, <DeviatoricStrainThresholdRatio1>, <DeviatoricDamageParameter1>, <InitialFriction1>, <AsymptoticFriction1>, <TransitionalStress1>, <DensificationRatio1>,
<VolumetricDeviatoricCoupling1>, <TensileUnloading1>, <ShearUnloading1>, <CompressiveUnloading1>, <ShearSoftening1>, <FinalHardeningModulusRatio1>, <ElasticAnalysisFlag1>, <Density2>,
<ElasticModulus2>, <Poisson2>, <TensileStrength2>, <TensileCharacteristicLength2>, <ShearStrengthRatio2>, <SofteningExponent2>, <CompressiveYieldingStrength2>, <InitialHardeningModulusRatio2>,
<TransitionalStrainRatio2>, <DeviatoricStrainThresholdRatio2>, <DeviatoricDamageParameter2>,  <InitialFriction2>, <AsymptoticFriction2>, <TransitionalStress2>, <DensificationRatio2>, <VolumetricDeviatoricCoupling2>,
<TensileUnloading2>, <ShearUnloading2>, <CompressiveUnloading2>, <ShearSoftening2>, <FinalHardeningModulusRatio2>, <ElasticAnalysisFlag2>, <Density3>, <ElasticModulus3>,
<Poisson3>, <TensileStrength3>, <TensileCharacteristicLength3>, <ShearStrengthRatio3>, <SofteningExponent3>, <CompressiveYieldingStrength3>, <InitialHardeningModulusRatio3>, <TransitionalStrainRatio3>,
<DeviatoricStrainThresholdRatio3>, <DeviatoricDamageParameter3>, <InitialFriction3>, <AsymptoticFriction3>, <TransitionalStress3>, <DensificationRatio3>, <VolumetricDeviatoricCoupling3>, <TensileUnloading3>,
<ShearUnloading3>, <CompressiveUnloading3>, <ShearSoftening3>, <FinalHardeningModulusRatio3>, <ElasticAnalysisFlag3>, <NumberOfUserElement>
*End Part
**
**
** ASSEMBLY
**
*Assembly, name=Assembly
**
*Instance, name=PART-1-1, part=PART-1
*End Instance
**
*Node
      1,          50.,          50.,         200.
      2,          50.,          50.,           0.
*Nset, nset=BOT_SURF, instance=PART-1-1
  31,  33,  57,  59,  60,  62
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*Nset, nset=RP1
 1,
*Nset, nset=RP2
 2,
*Nset, nset=TOP_SURF, instance=PART-1-1
   28,   30,   54,   56,   63,   65
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*Surface, type=NODE, name=BOT_SURF_CNS_, internal
BOT_SURF, 1.
*Surface, type=NODE, name=TOP_SURF_CNS_, internal
TOP_SURF, 1.
** Constraint: CONSTRAINT-1
*Coupling, constraint name=CONSTRAINT-1, ref node=RP2, surface=BOT_SURF_CNS_
*Kinematic
3, 3
4, 4
5, 5
** Constraint: CONSTRAINT-2
*Coupling, constraint name=CONSTRAINT-2, ref node=RP1, surface=TOP_SURF_CNS_
*Kinematic
3, 3
4, 4
5, 5
*End Assembly
*Amplitude, name=AMP-1, time=TOTAL TIME
             0.,              0.,           0.001,              1.,              5.,              1.
** ----------------------------------------------------------------
**
** STEP: Step-1
**
*Step, name=Step-1, nlgeom=YES
*Dynamic, Explicit
, 0.2
*Bulk Viscosity
0., 0.
**
** BOUNDARY CONDITIONS
**
** Name: BC-1 Type: Displacement/Rotation
*Boundary
RP2, 1, 1
RP2, 2, 2
RP2, 3, 3
RP2, 4, 4
RP2, 5, 5
RP2, 6, 6
** Name: BC-2 Type: Displacement/Rotation
*Boundary
RP1, 1, 1
RP1, 2, 2
RP1, 4, 4
RP1, 5, 5
RP1, 6, 6
** Name: Vel-BC-1 Type: Velocity/Angular velocity
*Boundary, amplitude=AMP-1, type=VELOCITY
RP1, 3, 3, -4.
**
** OUTPUT REQUESTS
**
*Restart, write, number interval=1, time marks=NO
**
** FIELD OUTPUT: F-Output-1
**
*Output, field, number interval=200
*Node Output, nset=RP1
RM, RT, UT
**
** FIELD OUTPUT: F-Output-2
**
*Node Output, nset=RP2
RM, RT, UT
**
** HISTORY OUTPUT: H-Output-1
**
*Output, history, variable=PRESELECT
*End Step
